T
# AguaClara Water Treatment Plants
# Automated Design
# Add variable descriptions next to every varible so it is easy to interpret what this all means.
AguaClaraDesignToolVersion := 10  # This is used by LabVIEW to confirm that a valid design tool program is open
# User Inputs:
HW_Sed := 2 m
# AutoCAD References
# Design References
# [reference: BasicClientInputs.xmcd]
# Use BasicClientInputs and ExpertClientInputs when this is run by LabVIEW.
# Use BasicInputs and ExpertInputs to use the program in MathCAD
# Change the reference by
# - right clicking
# - select properties
# - reference tab
# - type in the correct file name
# [reference: ExpertClientInputs.xmcd]
# [reference: DesignAssumptions.xmcd]
# [reference: MathFunctions.xmcd]
# [reference: PipeDatabase.xmcd]
# [reference: MinorLossCoefficients.xmcd]
# [reference: FluidsFunctions.xmcd]
# Sed Tanks and Slopes:
HW_Sed = 2 m
# [reference: Influent Sed Manifold.xmcd]
N_SedTanks = 3
B_SedPort = 5.65025 cm  # Height of the narrowest part of the manifold ports
W_SedPort = 5.65025 cm
H_SedBetween = 7.62 cm  # Distance from the top of the inlet manifold to the bottom of the ledge supporting the lamella frame
N_SedPorts = 32  # per bay
L_Sed = 9.61282 m
N_SedBays = 4  # Number of bays of inlet manifolds in each sed tank
A_SedPort = 31.9253 cm^2  # Port Area
L_SedPort = 6.52435 cm  # Length of the port through which water exits the inlet manifold
W_SedSludgeFlat = 5 cm  # Distance between tips of manifold plates (space alloted for the drain holes
W_SedSlopePlate = 30 cm  # Width of ferrous cement plates in whice one manifold port is cut
AN_SedTopInlet = 60 deg  # Angle of the top of the inlet manifold
Q_SedBay = 8.33333 L/s
42.5
AN_SedBottom = 10 deg  # Angle of the bottom of inlet manifold
L_SedSlopeManifold = 0.820897 m
W_SedSlopePlateRemaining = 0.0128171 m  # This is the extra distance between the last slope and the wall
# Sedimentation Tank Sludge Drain:
(W_Sed/2 - T_ChannelWall/2)/2 = 1.0325 m
# [reference: SludgeDrain.xmcd]
# We need to make the Drain plate width separate from the drain width
outerdiameter(4 in) = 11.43 cm
N_SedSludgeOrifices = 64  # per cell
W_SedSludge =  # error: This variable is undefined.  # Width of the sludge channel
Ti_SludgeDrain = 10 min  # Tank Drain time
0.1140/2 = 0.057
H_SedSludge = 12 cm  # Depth of the sludge channel
B_SedSludgeOrifices = 15 cm  # Distance center to center between drain orifices
T_SedSludge = 9.33013 cm
# Thickness of the plate topping the sludge channel
# through which drain holes are formed
0.8540 m/2 - W_SedSludge/2 =  # error
D_SedSludgeOrifice =  # error  # Diameter of drain orifices
# Sedimentation Tank Dimensions:
W_SedSludge =  # error
# [reference: Sedimentation Dimensions.xmcd]
T_SedInletSlope = 0.05 m
Z_SedSludge = 21.3301 cm  # Height from 0 of the top of the sludge drain
(W_Sed/2 - T_ChannelWall/2)/2 - W_SedSludge/2 =  # error
H_SedBottomSlope = 0.0723732 m  # Height of the bottom slope
H_SedTopSlope = 0.710918 m  # Height of the top of the inlet manifold
0.442 - 0.2915 = 0.1505
Z_SedSlopes = 1.02422 m  # Height from 0 of the top of the inlet manifold
1.004 m/2 - W_SedSludge/2 =  # error
T_SedSludge + H_SedSludge = 0.213301 m
H_Sed = 2.1 m  # Total tank wall height
T_SedInletSlope*cos(AN_SedTopInlet) = 2.5 cm
W_Sed = 4.28 m  # Total tank width
# Total tank length
12 + 9.33 = 21.33
L_Sed = 9.61282 m
T_SedInletSlope*sin(90 - AN_SedTopInlet) + T_SedInletSlope*cos(AN_SedTopInlet) = 0.0667521 m
# Inlet Channel:
2*(T_SedInletSlope*sin(90 - AN_SedTopInlet) + T_SedInletSlope*cos(AN_SedTopInlet)) + W_SedSludgeFlat + 5 cm = 0.233504 m
# [reference: Inlet Channel.xmcd]
W_InletChannel = 1.01669 m
HW_Sed - HW_InletChannel - T_ChannelWall = 1.10042 m
L_Channel = 13.29 m
HW_Sed - HW_InletChannel - T_ChannelWall - (0.3633 m - T_ChannelWall) = 0.887119 m
W_SedManifoldEntrance = 0.170744 m  # Width of the drop chimneys connecting channel to sed inlet manifolds
L_SedManifoldEntrance = 0.410449 m  # length of drop chimmneys
N_SedInletPipes = 2  # per sed bay
H_InletChannel = 0.849581 m
# Sedimentation Tank Effluent Launder:
# [reference: Launder.xmcd]
N_SedLaunderOrifices = 148  # Number of orifices per launder
# How many launders per cell?
# What is the spacing of the orfices?
# How many rows of orifices per launder?
Q_SedLaunderOrifices = 1.68919 L/min
B_SedLaunderOrifices = 0.1 m  # Center to center launder spacing
# Exit Channel:
# [reference: Exit Channel.xmcd]
W_ExitChannel = 1.01669 m
ND_SedLaunder =  # error
H_ExitChannel = 0.849581 m
L_SedLaunder = 7.42943 m
L_ExitChannel = 13.29 m
H_PltWeir = 0.585913 m  # height of the weir carrying water to the distribution tank
D_SedLaunderOrifice =  # error
HW_ExitChannel = 0.709581 m
Z_SedLaunder =  # error  # height from 0 of the launder
ZW_ExitChannel = 1.96 m  # water height in exit channel from 0
# Lamella:
# [reference: Lamella.xmcd]
L_SedPlate =  # error
42.5 in = 1.0795 m
B_SedPlate =  # error  # center to center distance between lamella
S_SedPlate =  # error  # spacing between lamella
N_SedPlates =  # error  # Number of Sed Plates per Sedimentation Tank Bay.
AN_SedPlate = 60 deg
V_SedC =  # error
V_SedUp = 70 m/day
H_SedPlate =  # error
H_SedAbove =  # error  # Height of water needed above the lamella
# Sedimentation Tank Floc Hopper:
# [reference: Floc Hopper.xmcd]
A_FlocHopper = 2.592 m^2
L_FlocHopper = 2.70705 m  # Length of the hopper cement plate
L_FlocHopperOffset =  # error  # distance from the edge of the channel to the bottom of the first lamella (collection distance)
W_FlocHopper = 0.9575 m  # width of the hopper set within each bay
# Flow Controller:
# [reference: FCM.xmcd]
N_Fcm =  # error
ID_FcmTube =  # error
ID_FcmTube =  # error
L_FcmTube =  # error
Q_FcmTubeMax =  # error
HL_FcmValve =  # error
# Flocculator: | Look at Flocculator Positioning arrays
# [reference: Flocculation Energy Dissapation.xmcd]
W_FlocChannel = 13.3531 m
L_Sed = 9.61282 m  # Fill last channel with bafffles from last channel
# Fix port width to be based on energy dissipation in that channel
# Adjust spacing after the number of baffles per channel is known.
ED_Floc = [0.006; 0.0005; 0.0005] mW/kg
# Check the residence time of the flocculator should be at least 20minutes
S_FlocBaffle = [43.679; 100; 100] cm
B_FlocBaffle = [44.179; 100.5; 100.5] cm
HW_FlocEnd = 2 m
L_FlocBaffles =  # error
X_FlocBaffles =  # error
N_FlocChannels =  # error
L_FlocTank =  # error
N_FlocBaffleSection =  # error
3*21 = 63
HL_Floc =  # error
HW_FlocStart =  # error
Z_FlocBaffles =  # error
W_FlocPort = 1 m
H_FlocPort = 7.6875 m
Ti_Floc =  # error  # residence time of the flocculator
L_FlocBaffleLower = [1.56321; 1; 1] m
L_FlocBaffleUpper =  # error
# Entrance Tank:
# [reference: EntranceTankDim.xmcd]
L_Et = 9.61282 m  # length of the entrance tank
W_Et = 13.3531 m  # width of the entrance tank
HW_EtMin = 0.2 m
HW_EtMax = 0.4 m
H_Et =  # error  # height of the entrance tank
ZW_Et =  # error
# Any additional needed elevations should be calculated in the files above.
# Elevations:
ZW_ExitChannel = 1.96 m  # Water Level at the end of the plant in the exit channel and exit channel box
HW_Sed = 2 m
HW_FlocStart =  # error  # Water level at the beginning of the floc tank
HL_Floc =  # error  # just for ref. the head loss throught the floc tank
ZW_Et =  # error  # the height of the water in the entrance tank.
# Rapid Mix:
# [reference: RapidMixer.xmcd]
# Assumptions: To be moved to basic inputs file
W_EtOrifice[30] = 0.031 m  # Height of Entrance Tank Orifice
# Calculations
L_trueET[30] = 2.58528 m  # Length of Entrance Tank Orifice
Pi_EtFlow[30] = 0.278388  # Ratio of the minimum flow divided by the maximum flow through the plant.
L_FlocEntryOrifice = 1335.31 cm  # Length of orifice entering into flocculator from Rapid Mix Unit
W_FlocEntryOrifice = 1.18469 cm  # Height of orifice entering into flocculator
ED_Diffusion = 0.732512 m^2/s^3  # Minimum Energy Dissipation needed
HL_FlocEntryOrifice = 8.7035 cm  # Head loss caused by entering flocculation tank.
A_FlocEntry = 0.158193 m^2  # Area required of entry port to flocculator
A_EtOrifice = 801.436 cm^2  # Area of Entrance Tank Orifice
HW_Total =  # error  # Total Height of water at beginning of rapid mix unit
HW_Channel2 = 22.6331 cm  # Height of water at the back of the entrance tank channel (from channel bottom)
HW_EtChannel = 11.3647 cm  # Height of Waterfall into flocculator
W_EtChannel = 43.679 cm  # Widt of entrance tank channel
L_Et = 3.51324 m  # Length of square entrance tank
Vol_Stock = 8100 L  # Volume of chemical stock tanks
# [reference: AutoCADMasterProgram.xmcd]
# AutoCAD References
